# 50281-Bolted bracket calculation
# JUL-27-2025
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# Referece: Machine Design-Bhandari Pg. 247
# INPUTS | Note: bolts 7 & 8 not considered
V := 2800*lb  # Weight including base, reducer, reducer bracket and male coupling
P := V
T := 1052688*in*lb  # Maximum output torque
B_TSA := .472 in^2  # Bolt tensile stress area
N_B := 6  # Number of bolts
Y_s := 60000*lb/in^2  # Anchor bolt Yield Strength, considering A354-Grade BD
# CALCULATION
# Primary Shear Forces, P'=P'1, P'2,  P'3,  P'4,  P'5,  P'6,
P' := V/N_B = 466.667 lb
# Fig.1
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P'_3 := P'
# Obtaining distances from center of bolt pattern to center of bolts r1=r4=r3=r6 and r2=r5
r_1 := sqrt((10.75*in)^2 + (12.5*in)^2) = 16.4867 in
r_2 := 12.5*in
r_7 := 15.5*in
# From fig.1 we can deduct that bolts 3, 6, 1 and 4 would be under max. shear forces
P''_3 := T*r_1/(4*(r_1^2) + 2*(r_2^2) + 2*(r_7^2)) = 9230.36 lb
# Resultant shear force on bolt 3 (Ps)
ΣFy := P'_3 + (P''_3*cos(49*deg)) = 6522.33 lb
ΣFx := P''_3*sin(49*deg) = 6966.24 lb
P_s := sqrt(ΣFy^2 + ΣFx^2) = 9543.03 lb
# STRESS DUE TO TENSION CALCULATION
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# The moment V x e tends to tilt the bracket about the lower edge, this way the top bolt row is taking maximum forces
e := 24.25*in  # base, reducer, reducer bracket and male coupling COG to mounting face
l_1 := 27.75*in  # Lower edge to upper bolt row distance
l_2 := 15.25*in  # Lower edge to lower bolt row distance
l_3 := 2.75*in
P_3 := P*e*l_3/(3*(l_1^2 + l_3^2) + 2*l_2^2) = 66.7352 lb  # Resisting forces in bolts 1 to 3
σ_t := P_3/B_TSA = 141.388 lb/in^2  # Stress in bolt due to tension
τ := P_s/B_TSA = 20218.3 lb/in^2  # Stress in bolt due to shear
τ_max := sqrt((σ_t/2)^2 + τ^2) = 20218.4 lb/in^2  # Maximum shear stress in bolts
# Load factor top row bolts
L_f := Y_s/τ_max = 2.96759
